# Лабораторная работа №1
# Ковалев Данил ВКБ32
# Вариант 7
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ε := 0.00001
y(x) := x - sin(x) - 0.25
# Отделение корней графически
# [plot: y(x) vs x]
# Отделение корней программно
root(y(x), x, 0, 2) = 1.17123
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ε := 0.001
MPD(a, b, f, ε) :=
    if f(a)*f(b) > 0
        return "Корней нет"
    i ← 0
    while |b - a| > ε
        x ← (a + b)/2
        i ← i + 1
        if f(x) == 0
            break
        also if f(a)*f(x) < 0
            b ← x
        else
            a ← x
        M[i, 0] ← x
    M
# Note : это параметры для отображения в матрице такие
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MPD(0, 2, y, ε) = [0; 1; 1.5; 1.25; 1.125; 1.1875; 1.15625; 1.17188; 1.16406; 1.16797; 1.16992; 1.1709]
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x := 0.25
solve block
    # constraints
    x - sin(x) - 0.25 == 0
    # solver
    Find(x) = 1.17123
end solve block
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# Note: тут у маткада проблема с x происходит, поэтому надо использовать x_1
y(x_1) solve, x_1 → 1.1712296525
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MPI(x0, f, φ, ε, maxn) :=
    n ← 0
    x ← φ(x0)
    while |x - x0| > ε and (n ≤ maxn)
        x0 ← x
        x ← x0 - φ(x0)*f(x)
        n ← n + 1
        M[n, 0] ← x
        M[n, 1] ← f(x)
    M
x := 0
φ(x) := d/dx(y(x)) → 1 - cos(x)
MPI(1, y, φ, 0.00001, 35) = [
    0, 0;
    0.483988, -0.231325;
    0.510556, -0.228106;
    0.539646, -0.224186;
    0.571505, -0.219393;
    0.606369, -0.213518;
    0.644435, -0.206312;
    0.685813, -0.197489;
    0.730465, -0.186751;
    0.778111, -0.173824
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]
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HORD(a, b, f, ε) :=
    n ← 0
    f2(x) ← d^2/dx^2(f(x))
    if f(a)*f(b) > 0
        x1 ← b
        c ← a
    else
        x1 ← a
        c ← b
    while |f(x1)| > ε
        n ← n + 1
        x2 ← x1 - f(x1)*(x1 - c)/(f(x1) - f(c))
        x1 ← x2
        M[n, 0] ← x1
    M
HORD(0, 2, y, ε) = [0; 0.45842; 0.794201; 0.996125; 1.09635; 1.14051; 1.15886; 1.16628; 1.16926; 1.17045]
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MKAS(a, b, f, ε, maxn) :=
    if (d/da(f(a)))*(d^2/da^2(f(a))) > 0
        x ← a
    else
        x ← b
    h ← 2*ε
    n ← 1
    while n ≤ maxn and |h| > ε
        h ← -f(x)/d/dx(f(x))
        x ← x + h
        M[n, 0] ← x
        n ← n + 1
    M
MKAS(-1, 2, y, ε, 10) = [0; 1.40635; 1.20326; 1.17197; 1.17123]
