# Worksheet setting: ORIGIN = 1
# Лабораторная работа №2
# Вариант 7
# Выполнил: Ковалев Данил ВКБ32
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# Как поменять начало индексации в документе?
# Нужно выбрать "Инструменты" -> "Параметры документа" -> "Индекс начала массива"
C := [0.30, 1.20, -0.20, -0.60; -0.10, -0.20, 1.60, 0.30; -1.50, -0.30, 0.10, 0.70]
A := [0.30, 1.20, -0.20; -0.10, -0.20, 1.60; -1.50, -0.30, 0.10]
b := [-0.60; 0.30; 0.70]
rank(C) = 3
rank(A) = 3  # Ранги равны соответственно по теореме Кронекера - Копелли существует решение
|A| = -2.676  # Не равно 0, поэтому сущесвтует единственное решение
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Given
0.30*x + 1.20*y - 0.20*z == -0.60
-0.10*x - 0.20*y + 1.60*z == 0.30
-1.50*x - 0.30*y + 0.10*z == 0.70
Find(x, y, z) → [-0.381913303438; -0.385276532138; 0.115470852018]
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lsolve(A, b) = [-0.381913; -0.385277; 0.115471]
A^-1*b = [-0.381913; -0.385277; 0.115471]
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rref(augment(A, b)) → [1.0, 0.0, 0.0, -0.381913303438; 0, 1.0, 0.0, -0.385276532138; 0, 0, 1.0, 0.115470852018]
# Метод Гаусса
Gauss(a, b, n) :=
    for i ∈ 1 .. n
        for j ∈ 1 .. n
            a0[i, j] ← a[i, j]
        b0[i] ← b[i]
    for k ∈ 1 .. n - 1
        if a[k, k] == 0
            m ← k + 1
            while m ≤ n and a[m, k] == 0
                m ← m + 1
            return "система не обусловлена " if m > n
            for j ∈ 1 .. n
                R ← a[m, j]
                a[m, j] ← a[k, j]
                a[k, j] ← R
            R ← b[m]
            b[m] ← b[k]
            b[k] ← R
        for i ∈ k + 1 .. n
            q ← a[i, k]/a[k, k]
            for j ∈ k .. n
                a[i, j] ← a[i, j] - q*a[k, j]
            b[i] ← b[i] - q*b[k]
    x[n] ← b[n]/a[n, n]
    for i ∈ n - 1, n - 2 .. 1
        s ← 0
        for j ∈ i + 1 .. n
            s ← s + a[i, j]*x[j]
        x[i] ← (b[i] - s)/a[i, i]
    for i ∈ 1 .. n
        s ← 0
        for j ∈ 1 .. n
            s ← s + a0[i, j]*x[j]
        δ[i] ← b0[i] - s
    [x; a; δ]  # Запоминание исходных коэффициентов
# Запоминание строки
# Обратный ход
Погрешности
Gauss(A, b, 3)[3] = [0; 0; -8.88178e-16]
Gauss(A, b, 3) = [
    [-0.381913; -0.385277; 0.115471]; [0.3, 1.2, -0.2; 0, 0.2, 1.53333; 0, 0, -44.6]; [0; 0; -8.88178e-16]
]  # Коэффициенты
Gauss(A, b, 3)[2] = [0.3, 1.2, -0.2; 0, 0.2, 1.53333; 0, 0, -44.6]
Решение
Gauss(A, b, 3)[1] = [-0.381913; -0.385277; 0.115471]
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A1 := [-0.60, 1.20, -0.20; 0.30, -0.20, 1.60; 0.70, -0.30, 0.10]
A2 := [0.30, -0.60, -0.20; -0.10, 0.30, 1.60; -1.50, 0.70, 0.10]
A3 := [0.30, 1.20, -0.60; -0.10, -0.20, 0.30; -1.50, -0.30, 0.70]
D1 := |A1|
D2 := |A2|
D3 := |A3|
D := |A|
D1 → 1.022
D2 → 1.031
D3 → -0.309
D → -2.676
x3 := D3/D
x1 := D1/D
x2 := D2/D
x1 → -0.381913303438
x2 → -0.385276532138
x3 → 0.115470852018
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ε := 0.0001
MPI(a, b, n, ε, kmax) :=
    k ← 0
    for i ∈ 1 .. n
        x[i] ← 0
    δ ← 2*ε
    while δ > ε and k ≤ kmax
        m ← -100
        k ← k + 1
        for i ∈ 1 .. n
            x0[i] ← x[i]
        M[k, 1] ← k
        for i ∈ 1 .. n
            S ← 0
            for j ∈ 1 .. n
                continue if (j == i)
                S ← S + a[i, j]*x0[j]
            x[i] ← 1/a[i, i]*(b[i] - S)
            m ← |x[i] - x0[i]| if |x[i] - x0[i]| > m
            M[k, i + 1] ← x[i]
        δ ← m
        M[k, n + 2] ← δ
    M
b1 := [0.70; -0.60; 0.30]
A1 := [-1.50, -0.30, 0.10; 0.30, 1.20, -0.20; -0.10, -0.20, 1.60]
MPI(A1, b1, 3, ε, 100) = [
    1, -0.466667, -0.5, 0.1875, 0.5;
    2, -0.354167, -0.352083, 0.0958333, 0.147917;
    3, -0.389861, -0.395486, 0.121354, 0.0434028;
    4, -0.379479, -0.382309, 0.113698, 0.0131771;
    5, -0.382625, -0.386181, 0.115994, 0.00387153;
    6, -0.381698, -0.385011, 0.115313, 0.00116913;
    7, -0.381977, -0.385357, 0.115517, 0.000345269;
    8, -0.381894, -0.385253, 0.115457, 0.000103816;
    9, -0.381919, -0.385284, 0.115475, 3.07665e-5
]
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zeid(a, b, n, ε, kmax) :=
    k ← 0
    δ ← 2*ε
    for i ∈ 1 .. n
        x[i] ← 0
    while δ > ε and k < kmax
        for i ∈ 1 .. n
            x0 ← x
        k ← k + 1
        for i ∈ 1 .. n
            s ← 0
            for j ∈ 1 .. n
                s ← s + a[i, j]*x[j] if j ≠ i
            x[i] ← 1/a[i, i]*(b[i] - s)
        δ ← |x - x0|
        M[k, 1] ← k
        for i ∈ 1 .. n
            M[k, i + 1] ← x[i]
        M[k, 5] ← δ
    M
zeid(A1, b1, 3, ε, 100) = [
    1, -0.466667, -0.383333, 0.110417, 0.613933;
    2, -0.382639, -0.385938, 0.115343, 0.0842123;
    3, -0.38179, -0.385329, 0.115472, 0.00105283;
    4, -0.381903, -0.385279, 0.115471, 0.000123617;
    5, -0.381913, -0.385277, 0.115471, 1.0299e-5
]
