# Ковалев Данил ВКБ32 | Лабораторная работа 5
# Вариант 7
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a := 0
b := 1
y[0] := 2
h := 0.1
h2 := 0.2
y2[0] := 2
i := 0 .. 10
x[i + 1] := a + i*h
j := 0 .. 5
x2[j + 1] := a + j*h2
y[i + 1] := y[i] + h*(3*x[i]*y[i] + 1)/(5 - x[i] + y[i]^2)
y2[j + 1] := y2[j] + h2*(3*x2[j]*y2[j] + 1)/(5 - x2[j] + y2[j]^2)
x2 =  # no stored result
y2 =  # no stored result
x =  # no stored result
y =  # no stored result
# Оценка погрешности
|y2[6] - y[11]|/15 =  # no stored result
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# Функция которую вычислить
f(x, y) := (1 + 3*x*y)/(5 - x + y^2)
y2[j + 1] := y2[j] + h2*f(x2[j], y2[j])
y[i + 1] := y[i] + h*f(x[i], y[i])
k[1] := h*f(x[1], y[1])
k2[1] := h2*f(x2[1], y2[1])
k[2] := h*f(x[1] + h/2, y[1] + k[1]/2)
k2[2] := h2*f(x2[1] + h2/2, y2[1] + k2[1]/2)
k[3] := h*f(x[2] + h/2, y[2] + k[2]/2)
k2[3] := h2*f(x2[2] + h2/2, y2[2] + k2[2]/2)
k[4] := h*f(x[3] + h, y[3] + k[3])
k2[4] := h2*f(x2[3] + h2, y2[3] + k2[3])
y[i + 1] := y[i] + (k[1] + 2*k[2] + 2*k[3] + k[4])/6
y2[j + 1] := y2[j] + (k2[1] + 2*k2[2] + 2*k2[3] + k2[4])/6
x2 =  # no stored result
y2 =  # no stored result
x =  # no stored result
y =  # no stored result
# Оценка погрешности
|y2[6] - y[11]|/15 =  # no stored result
# Вывод: погрешность меньше у метода Рюнге-Кутты, поэтому он более точный
