# Ковалев Данил ВКБ32 | Лабораторная работа 5
# Вариант 7
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a := 0
b := 1
y[0] := 2
h := 0.1
h2 := 0.2
y2[0] := 2
i := 0 .. 10
x[i + 1] := a + i*h
j := 0 .. 5
x2[j + 1] := a + j*h2
y[i + 1] := y[i] + h*(3*x[i]*y[i] + 1)/(5 - x[i] + y[i]^2)
y2[j + 1] := y2[j] + h2*(3*x2[j]*y2[j] + 1)/(5 - x2[j] + y2[j]^2)
x2 = [0; 0; 0.2; 0.4; 0.6; 0.8; 1]
y2 = [2; 2.02222; 2.04423; 2.09382; 2.17202; 2.27971; 2.41744]
x = [0; 0; 0.1; 0.2; 0.3; 0.4; 0.5; 0.6; 0.7; 0.8; 0.9; 1]
y = [2; 2.01111; 2.02217; 2.04004; 2.06486; 2.09675; 2.13583; 2.18222; 2.23601; 2.29725; 2.36598; 2.44216]
# Оценка погрешности
|y2[6] - y[11]|/15 = 0.00164791
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# Функция которую вычислить
f(x, y) := (1 + 3*x*y)/(5 - x + y^2)
y2[j + 1] := y2[j] + h2*f(x2[j], y2[j])
y[i + 1] := y[i] + h*f(x[i], y[i])
k[1] := h*f(x[1], y[1])
k2[1] := h2*f(x2[1], y2[1])
k[2] := h*f(x[1] + h/2, y[1] + k[1]/2)
k2[2] := h2*f(x2[1] + h2/2, y2[1] + k2[1]/2)
k[3] := h*f(x[2] + h/2, y[2] + k[2]/2)
k2[3] := h2*f(x2[2] + h2/2, y2[2] + k2[2]/2)
k[4] := h*f(x[3] + h, y[3] + k[3])
k2[4] := h2*f(x2[3] + h2, y2[3] + k2[3])
y[i + 1] := y[i] + (k[1] + 2*k[2] + 2*k[3] + k[4])/6
y2[j + 1] := y2[j] + (k2[1] + 2*k2[2] + 2*k2[3] + k2[4])/6
x2 = [0; 0; 0.2; 0.4; 0.6; 0.8; 1]
y2 = [2; 2.05479; 2.10959; 2.16438; 2.21917; 2.27397; 2.32876]
x = [0; 0; 0.1; 0.2; 0.3; 0.4; 0.5; 0.6; 0.7; 0.8; 0.9; 1]
y = [2; 2.01909; 2.03817; 2.05726; 2.07634; 2.09543; 2.11452; 2.1336; 2.15269; 2.17178; 2.19086; 2.20995]
# Оценка погрешности
|y2[6] - y[11]|/15 = 0.0079207
# Вывод: погрешность меньше у метода Рюнге-Кутты, поэтому он более точный
