# Ковалев Данил ВКБ32 | Лабораторная работа 8
# Вариант 7
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# N | a | b
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i := 1 .. 5
ORIGIN := 1
x[1] := 1.9
y[1] := 6.6
a := 2
x[2] := 2.1
y[2] := 7.6
b := 2
x[3] := 2.0
y[3] := 6.7
x[4] := 2.9
y[4] := 9.2
x[5] := 3.0
y[5] := 9.4
# [plot: y[i] vs x[i]]
# 1. Рассмотрим семейство гипербол
f(x, a, b) := a + b/x
# Составим сумму квадратов отклонений левых и правых частей
S(a, b) := sum((f(x[i], a, b) - y[i])^2, i = 1 .. 5)
# Найдем наименьшее значение функции S
solve block
    # solver
    P := Minimize(S, a, b)
end solve block
P = [14.2817; -14.6326]
# Значение параметров а и б, при которых функция S достигает наименьшего значения, равны
a := P*[1; 0]
b := P*[0; 1]
f1(t) := a + b/t
# Построим экспериментальные точки и график полученной функции
# [plot: f1(t), y[i] vs t, x[i]]
S1 := sum((y[k] - f1(x)[k])^2, k = 1 .. 5) = 0.154049
h(x, a, b) := 1/(a + b*x)
S(a, b) := sum((h(x[i], a, b) - y[i])^2, i = 1 .. 5)
P := Minimize(S, a, b)
P = [-443640; -961026]
a := P*[1; 0]
b := P*[0; 1]
h1(t) := 1/(a + b*t)
# [plot: h1(t), y[i] vs t, x[i]]
S2 := sum((y[k] - h1(x)[k])^2, k = 1 .. 5) = 319.21
S1 > S2 → 0
