# Задание 3
# Уплотнить часть таблицы заданной на отрезке  функции, используя интерполяционный многочлен Ньютона и оценить погрешность интерполяции.
a := 0.15
b := 0.3
h := 0.025
n := 3
i := 0 .. n
h0 := 0.05
x[i] := a + i*h0
y[i] := cos(x[i])
x = [0.15; 0.2; 0.25; 0.3]
y = [0.988771; 0.980067; 0.968912; 0.955336]
t := (x - x[3])/h0
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n1 := 0 .. 2
n2 := 0 .. 1
n3 := 0
Δ1y[n1] := y[n1 + 1] - y[n1]
Δ2y[n2] := Δ1y[n2 + 1] - Δ1y[n2]
Δ3y[n3] := Δ2y[n3 + 1] - Δ2y[n3]
Δ1y = [-0.0087045; -0.0111542; -0.0135759]
Δ2y = [-0.00244966; -0.00242178]
Δ3y = [2.78796e-5]
Pn(x) := y[3] + t*Δ1y[2] + t*(t + 1)*Δ2y[1]/2! + t*(t - 1)*(t - 2)*Δ3y[0]/3!
R := h0^(n + 1)/(n + 1)!*|t*(t + 1)*(t + 2)*(t + 3)|
R = 1.66667e-5
# [plot: y[i], Pn(x) vs x[i], x]
