# Ковалев Данил ВКБ32 | Лабораторная работа 4
# Вариант 7
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a := 1.2
b := 2.2
x[0] := a
f(x) := 2.6*x^2*ln(x)
integral(f(x), x = a .. b) → 4.4261611
# Реализация численного интегрирования с помощью формулы трапеций
MT(a, b, f, n) :=
    h ← (b - a)/n
    s ← 0
    t ← (f(a) + f(b))/2
    for i ∈ 1 .. n - 1
        s ← s + f(a + i*h)
    s ← h*(t + s)
    s
# Вариант, когда количество шагов у нас 10
MT(a, b, f, 10) = 4.4349
# При большем шаге достигается большая точность вычислений
# Вариант, когда количество шагов у нас 20
MT(a, b, f, 20) = 4.42834
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e := 10^-6
Simpson(f, a, b, e) :=
    Sum(h, m) ← sum(f(a + (2*k + 1)*h), k = 0 .. m)
    n ← 1
    S ← f(a) + f(b)
    h ← (b - a)/2
    P ← 0
    m ← 0
    Q ← f((a + b)/2)
    Integ1 ← 10^10
    Integ2 ← 2*h/3*(S/2 + 4*Q)
    while |Integ1 - Integ2| ≥ e
        m ← 2^n - 1
        n ← n + 1
        h ← h/2
        P ← P + Q
        Q ← Sum(h, m)
        Integ1 ← Integ2
        Integ2 ← 2*h/3*(S/2 + 2*Q + P)
    [Integ2, n]
I := Simpson(f, a, b, e) = [4.42616, 5]
# Сравнение точности методов
y1 := MT(a, b, f, 10)
y2 := MT(a, b, f, 20)
h := (b - a)/2
h1 := (b - a)/10
h2 := (b - a)/20
Rsim := max(|f(x)^4|)*|b - a|*h^4/180 = 7.53881e-5
R1 := max(|y1^2|)*|b - a|*h1^2/12 = 0.0163903
R2 := max(|y2^2|)*|b - a|*h2^2/12 = 0.00408547
R1 > R2 > Rsim → 1
# Можем сделать вывод что наибольшая точность достигается при использовании метода Симпсона.
# Однако метод трапеций может давать точные результаты при уменьшении шага, но это влечёт
# большие вычислительные затраты.
