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a := 1.2
b := 2.2
n1 := 10
h1 := (b - a)/n1 = 0.1
n2 := 20
h2 := (b - a)/n2 = 0.05
i1 := 0 .. n1
i2 := 0 .. n2
x[0] := a
x1[i1] := x[0] + i1*h1
x2[i2] := x[0] + i2*h2
y1_i1 := 2.6*x1[i1]^2*ln(x1[i1])  # error: Значение должно быть целым числом.
x1 = [1.2; 1.3; 1.4; 1.5; 1.6; 1.7; 1.8; 1.9; 2; 2.1; 2.2]
y1 =  # error: Эта переменная не определена. Проверьте правильность установки обозначения.
x2 = [1.2; 1.25; 1.3; 1.35; 1.4; 1.45; 1.5; 1.55; 1.6; 1.65; 1.7; 1.75; 1.8; 1.85; 1.9; 1.95; 2; 2.05; 2.1; 2.15; 2.2]
y2 =  # error
y1[10, :] := 2.6*x1^2*ln(x1) = [49.6512]
y2[20, :] := 2.6*x2^2*ln(x2) = [93.8692]
s1 := h1*((y1[0] + y1[n1])/2 + sum(y1[i1], i1 = 1 .. n1 - 1)) = 2.48256
s2 := h2*((y2[0] + y2[n2])/2 + sum(y2[i2], i2 = 1 .. n2 - 1)) = 2.34673
f(x) := 2.6*x^2*ln(x)
integral(f(x), x = a .. b) → 4.42616112439 = 4.42616
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e := 10^-6
Simpson(f, a, b, e) :=
    Sum(h, m) ← sum(f(a + (2*k + 1)*h), k = 0 .. m)
    n ← 1
    S ← f(a) + f(b)
    h ← (b - a)/2
    P ← 0
    m ← 0
    Q ← f((a + b)/2)
    Integ1 ← 10^10
    Integ2 ← 2*h/3*(S/2 + 4*Q)
    while |Integ1 - Integ2| ≥ e
        m ← 2^n - 1
        n ← n + 1
        h ← h/2
        P ← P + Q
        Q ← Sum(h, m)
        Integ1 ← Integ2
        Integ2 ← 2*h/3*(S/2 + 2*Q + P)
    [Integ2, n]
I := Simpson(f, a, b, e) = [4.42616, 5]
# Сравнение точности методов
R1 := max(|y2^2|)*|b - a|*h1^2/12 = 7.34285
R2 := max(|y2^2|)*|b - a|*h2^2/12 = 1.83571
h := (b - a)/2
Rsim := max(|f(x)^4|)*|b - a|*h^4/180 = 7.53881e-5
R1 > R2 > Rsim → 1
