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a := 2
b := 3
x[0] := a
i := 0 .. 10
h := 0.1
x[i + 1] := x[0] + i*h
y[0] := 2
y2[0] := 2
j := 0 .. 5
h2 := 0.2
x2[j + 1] := x[0] + j*h2
y[i + 1] := y[i] + h*(x[i]^2 + y[i] + 2)/(2*x[i] - y[i])
y2[j + 1] := y2[j] + h2*(x2[j]^2 + y2[j] + 2)/(2*x2[j] - y[j])
x = [2; 2; 2.1; 2.2; 2.3; 2.4; 2.5; 2.6; 2.7; 2.8; 2.9; 3]
y = [2; 2.4; 2.925; 3.65716; 5.07026; 2.44189; 2.87452; 3.3979; 4.07256; 5.07919; 7.94382; 7.0877]
x2 = [0; 2; 2.2; 2.4; 2.6; 2.8; 3]
y2 = [2; 1.6; 2.55; 3.82322; 5.85031; 28.3732; 30.7932]
