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a := 2
b := 3
x[0] := a
i := 0 .. 10
h := 0.1
x[i + 1] := x[0] + i*h
y[0] := 2
j := 0 .. 5
h2 := 0.2
x2[j + 1] := x[0] + j*h2
y2[0] := 2
f(x, y) := (x^2 + y + 2)/(2*x - y)
y[i + 1] := y[i] + h*f(x[i], y[i])
y2[j + 1] := y2[j] + h2*f(x2[j], y2[j])
k2[1] := h2*f(x2[1], y2[1])
k[1] := h*f(x[1], y[1])
k[2] := h*f(x[1] + h/2, y[1] + k[1]/2)
k2[2] := h2*f(x2[1] + h2/2, y2[1] + k2[1]/2)
k[3] := h*f(x[2] + h/2, y[2] + k[2]/2)
k2[3] := h2*f(x2[2] + h2/2, y2[2] + k2[2]/2)
k[4] := h*f(x[3] + h, y[3] + k[3])
k2[4] := h2*f(x2[3] + h2, y2[3] + k2[3])
y[i + 1] := y[i] + (k[1] + 2*k[2] + 2*k[3] + k[4])/6
y2[j + 1] := y2[j] + (k2[1] + 2*k2[2] + 2*k2[3] + k2[4])/6
x = [2; 2; 2.1; 2.2; 2.3; 2.4; 2.5; 2.6; 2.7; 2.8; 2.9; 3]
y = [2; 13.1001; 24.2002; 35.3003; 46.4004; 57.5005; 68.6006; 79.7006; 90.8007; 101.901; 113.001; 124.101]
x2 = [0; 2; 2.2; 2.4; 2.6; 2.8; 3]
y2 = [2; 3.05233; 4.10465; 5.15698; 6.2093; 7.26163; 8.31395]
e := (y[11] + y2[6])/15
e = 8.82766
