# Лабораторная работа 6
# Ковалев Данил ВКБ32
# Вариант 7
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i := 1 .. 10
ORIGIN := 1
x[1] := 1.9
y[1] := 6.6
x[2] := 2.1
y[2] := 7.6
x[3] := 2.0
y[3] := 6.7
x[4] := 2.9
y[4] := 9.2
x[5] := 3.0
y[5] := 9.4
x[6] := 2.6
y[6] := 7.8
x[7] := 2.5
y[7] := 8.4
x[8] := 2.7
y[8] := 8.0
x[9] := 2.2
y[9] := 7.9
x[10] := 2.8
y[10] := 8.7
x := sort(x)
y := sort(y)
mx := sum(x[i], i = 1 .. 10)/10
mx2 := sum(x[i]^2, i = 1 .. 10)/10
mxy := sum(x[i]*y[i], i = 1 .. 10)/10
my := sum(y[i], i = 1 .. 10)/10
mx =  # no stored result
mx2 =  # no stored result
mxy =  # no stored result
my =  # no stored result
solve block
    mx2*a + mx*b == mxy
    mx*a + b == my
    res1 := Find(a, b) → [2.27623126338; 2.40770877944]
end solve block
a1 := res1[1]
b1 := res1[2]
y1(x) := a1*x + b1
mx4 := sum(x[i]^4, i = 1 .. 10)/10
mx3 := sum(x[i]^3, i = 1 .. 10)/10
mx2y := sum(x[i]^2*y[i], i = 1 .. 10)/10
mx4 =  # no stored result
mx3 =  # no stored result
mx2y =  # no stored result
solve block
    mx4*a + mx3*b + mx2*c == mx2y
    mx3*a + mx2*b + mx*c == mxy
    mx2*a + mx*b + c == my
    res2 := Find(a, b, c) → [0.403639492224; 0.305485211519; 4.75633745658]
end solve block
a2 := res2[1]
b2 := res2[2]
c2 := res2[3]
y2(x) := a2*x^2 + b2*x + c2
y1(x) =  # no stored result
y2(x) =  # no stored result
y =  # no stored result
# [plot: y1(x), y vs x]
Линейная
# [plot: y2(x), y vs x]
Квадратичная
S1 := sum((y[k] - y1(x)[k])^2, k = 1 .. 10)
S2 := sum((y[k] - y2(x)[k])^2, k = 1 .. 10)
S1 > S2 → 1
к12
# Выводы по заданию
# Наиболее подходящим оказалась квадратичная формула.
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# 1) Поиск степенной приближающей фунции y = ax^m
# Пролагорифмиурем ln(y) = m*ln(x)+ln(a)
mx2 := sum(ln(x[i])^2, i = 1 .. 10)/10
mx := sum(ln(x[i]), i = 1 .. 10)/10
mxy := sum(ln(x[i])*ln(y[i]), i = 1 .. 10)/10
my := sum(ln(y[i]), i = 1 .. 10)/10
# Замена : m = A,  ln(a) = B, ln(y)  = v, ln(x) = u
# Получим v = Au+B
solve block
    mx2*a + mx*b == mxy
    mx*a + b == my
    res3 := Find(a, b) → [0.692418494124; 1.45904995973]
end solve block
m1 := res3[1]
a3 := e^res3[2]
y3(x) := a3*x^m1
# 2) Поиск экспоненциальной приближающей фунции y = ae^mx
# Пролагорифмиурем ln(y) = mx+ln(a)
# Замена : m = A,  ln(a) = B, ln(y)  = v, x = u
mx2 := sum(x[i]^2, i = 1 .. 10)/10
mx := sum(x[i], i = 1 .. 10)/10
mxy := sum(x[i]*ln(y[i]), i = 1 .. 10)/10
my := sum(ln(y[i]), i = 1 .. 10)/10
# Получим v = Au+B
solve block
    mx2*a + mx*b == mxy
    mx*a + b == my
    res4 := Find(a, b) → [0.287586231638; 1.3665841441]
end solve block
m2 := res4[1]
a4 := e^res4[2]
y4(x) := a4*e^(m2*x)
# [plot: y3(x), y vs x]
# Квадратичная
# [plot: y4(x), y vs x]
Экспоненциальная
y3(x) =  # no stored result
y4(x) =  # no stored result
# [plot: y1(x), y3(x), y4(x), y vs x]
S3 := sum((y[k] - y3(x)[k])^2, k = 1 .. 10)
S4 := sum((y[k] - y4(x)[k])^2, k = 1 .. 10)
S3 > S4 → 1
# Итог задания 2
# Метод оказался наименьшим для экспоненциальной функции
# Итоги лабораторной работы
S1 =  # no stored result
S2 =  # no stored result
S3 =  # no stored result
S4 =  # no stored result
S3 > S4 > S1 > S2 → 0
# Из всех расмотренных функций наименьшим метод меньших квдратов - это для квадроатичной функции
