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i := 1 .. 10
ORIGIN := 1
x[1] := 2.0
y[1] := 7.5
x[2] := 1.2
y[2] := 5.9
x[3] := 1.8
y[3] := 7.0
x[4] := 1.9
y[4] := 8.0
x[5] := 1.1
y[5] := 5.0
x[6] := 1.7
y[6] := 7.4
x[7] := 1.6
y[7] := 6.4
x[8] := 1.4
y[8] := 6.6
y[9] := 6.3
x[9] := 1.5
x[10] := 1.3
y[10] := 5.7
x := sort(x)
y := sort(y)
mx := sum(x[i], i = 1 .. 10)/10
mx2 := sum(x[i]^2, i = 1 .. 10)/10
mxy := sum(x[i]*y[i], i = 1 .. 10)/10
my := sum(y[i], i = 1 .. 10)/10
mx = 1.55
mx2 = 2.485
mxy = 10.446
my = 6.58
solve block
    # constraints
    mx2*a + mx*b == mxy
    mx*a + b == my
    # solver
    res1 := Find(a, b) → [2.99393939394; 1.93939393939]
end solve block
a1 := res1[1]
b1 := res1[2]
y1(x) := a1*x + b1
mx4 := sum(x[i]^4, i = 1 .. 10)/10
mx3 := sum(x[i]^3, i = 1 .. 10)/10
mx2y := sum(x[i]^2*y[i], i = 1 .. 10)/10
mx4 = 6.97333
mx3 = 4.1075
mx2y = 17.1154
solve block
    # constraints
    mx4*a + mx3*b + mx2*c == mx2y
    mx3*a + mx2*b + mx*c == mxy
    mx2*a + mx*b + c == my
    # solver
    res2 := Find(a, b, c) → [-0.30303030303; 3.93333333333; 1.23636363636]
end solve block
a2 := res2[1]
b2 := res2[2]
c2 := res2[3]
y2(x) := a2*x^2 + b2*x + c2
y = [5; 5.7; 5.9; 6.3; 6.4; 6.6; 7; 7.4; 7.5; 8]
y1(x) = [5.23273; 5.53212; 5.83152; 6.13091; 6.4303; 6.7297; 7.02909; 7.32848; 7.62788; 7.92727]
y2(x) = [5.19636; 5.52; 5.83758; 6.14909; 6.45455; 6.75394; 7.04727; 7.33455; 7.61576; 7.89091]
S1 := sum((y[k] - y1(x)[k])^2, k = 1 .. 10) = 0.16097
S2 := sum((y[k] - y2(x)[k])^2, k = 1 .. 10) = 0.156121
S1 > S2 → 1
# [plot: y1(x), y vs x]
Линейная
# [plot: y2(x), y vs x]
Квадратичная
