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i := 1 .. 10
ORIGIN := 1
x[1] := 2.0
y[1] := 7.5
x[2] := 1.2
y[2] := 5.9
x[3] := 1.8
y[3] := 7.0
x[4] := 1.9
y[4] := 8.0
x[5] := 1.1
y[5] := 5.0
x[6] := 1.7
y[6] := 7.4
x[7] := 1.6
y[7] := 6.4
x[8] := 1.4
y[8] := 6.6
x[9] := 1.5
y[9] := 6.3
x[10] := 1.3
y[10] := 5.7
x := sort(x)
y := sort(y)
mx2 := sum(ln(x[i])^2, i = 1 .. 10)/10
mx := sum(ln(x[i]), i = 1 .. 10)/10
mxy := sum(ln(x[i])*ln(y[i]), i = 1 .. 10)/10
my := sum(ln(y[i]), i = 1 .. 10)/10
solve block
    # constraints
    mx2*a + mx*b == mxy
    mx*a + b == my
    # solver
    res3 := Find(a, b) → [0.703337475264; 1.57927260906]
end solve block
m1 := res3[1]
a3 := e^res3[2]
y3(x) := a3*x^m1
mx2 := sum(x[i]^2, i = 1 .. 10)/10
mx := sum(x[i], i = 1 .. 10)/10
mxy := sum(x[i]*ln(y[i]), i = 1 .. 10)/10
my := sum(ln(y[i]), i = 1 .. 10)/10
solve block
    # constraints
    mx2*a + mx*b == mxy
    mx*a + b == my
    # solver
    res4 := Find(a, b) → [0.462459517288; 1.15823859045]
end solve block
m2 := res4[1]
a4 := e^res4[2]
y4(x) := a4*e^(m2*x)
y3(x) = [5.18779; 5.51519; 5.83459; 6.14677; 6.4524; 6.75203; 7.04616; 7.3352; 7.61951; 7.89942]
y4(x) = [5.29596; 5.54663; 5.80916; 6.08412; 6.37209; 6.6737; 6.98958; 7.32041; 7.66689; 8.02978]
S3 =  # error: Эта переменная не определена. Проверьте правильность установки обозначения.
S3 := sum((y[k] - y3(x)[k])^2, k = 1 .. 10) = 0.153769
S4 := sum((y[k] - y4(x)[k])^2, k = 1 .. 10) = 0.207366
S3 > S4 → 0
S1 =  # error
S2 =  # error
S4 = 0.207366
S3 > S4 > S1 > S2 → 0
# [plot: y3(x), y vs x]
# Квадратичная
# [plot: y4(x), y vs x]
Экспоненциальная
