# Ковалев Данил ВКБ32 | Лабораторная работа 7
# Вариант 7
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f(x) := (1.5*x^2 + 1)*sin(2*π*x)
i := 0 .. 5
j := 0 .. 4
x[0] := 0
x[5] := 0.5
h := 0.1
x[i + 1] := x[i] + h
u[i, 0] := f(x[i])
u[0, j + 1] := 0
u[5, j + 1] := 0
i := 1 .. 4
u[i, 1] := (u[i - 1, 0] + u[i + 1, 0])/2
u[i, 2] := (u[i - 1, 1] + u[i + 1, 1])/2
u[i, 3] := (u[i - 1, 2] + u[i + 1, 2])/2
u[i, 4] := (u[i - 1, 3] + u[i + 1, 3])/2
u[i, 5] := (u[i - 1, 4] + u[i + 1, 4])/2
f4(x) := d^4/dx^4((1.5*x^2 + 1)*sin(2*π*x)) collect → x^2*2337.81818482*sin(6.28318530718*x) + (847.933939666*sin(6.28318530718*x) - x*2976.60256131*cos(6.28318530718*x))
# [plot: f4(x) vs x]
f4(x) = [3775.55; 4273.95; 4581.98; 4581.98; 4273.95; 3775.55; 3277.15]
u = [
    0, 0, 0, 0, 0, 0;
    0.596602, 0.50406, 0.419013, 0.343137, 0.276972, 0.225849;
    1.00812, 0.838026, 0.686273, 0.553944, 0.451698, 0.363081;
    1.07945, 0.868487, 0.688875, 0.560258, 0.449191, 0.365913;
    0.728854, 0.539725, 0.434243, 0.344438, 0.280129, 0.224595;
    0, 0, 0, 0, 0, 0
]
m1 := |max(f4(x))| = 4581.98
T := 0.03
ε := T*m1*h^2 = 1.37459
