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f(x) := (x^2 - 1.3)*sin(2*π*x)
i := 0 .. 5
j := 0 .. 4
x[0] := 0
x[5] := 0.5
h := 0.1
x[i + 1] := x[i] + h
f4(x) := d^4/dx^4((x^2 - 1.3)*sin(2*π*x)) collect → x^2*1558.54545654*sin(6.28318530718*x) - (x*1984.40170754*cos(6.28318530718*x) + 2499.85010476*sin(6.28318530718*x))
u[i, 0] := f(x[i])
u[0, j + 1] := 0
u[5, j + 1] := 0
i := 1 .. 4
# [plot: f4(x) vs x]
u[i, 1] := (u[i - 1, 0] + u[i + 1, 0])/2
u[i, 2] := (u[i - 1, 1] + u[i + 1, 1])/2
f4(x) = [2517.03; 1047.66; 139.534; 139.534; 1047.66; 2517.03; 3986.41]
u[i, 3] := (u[i - 1, 2] + u[i + 1, 2])/2
u[i, 4] := (u[i - 1, 3] + u[i + 1, 3])/2
u[i, 5] := (u[i - 1, 4] + u[i + 1, 4])/2
u = [
    0, 0, 0, 0, 0, 0;
    -0.758243, -0.599166, -0.477255, -0.383342, -0.310551, -0.250059;
    -1.19833, -0.954511, -0.766684, -0.621103, -0.500118, -0.40617;
    -1.15078, -0.934203, -0.76495, -0.616893, -0.501789, -0.404282;
    -0.670075, -0.575389, -0.467102, -0.382475, -0.308447, -0.250894;
    0, 0, 0, 0, 0, 0
]
m1 := |max(f4(x))| = 3986.41
T := 0.03
ε := T*m1*h^2 = 1.19592
