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i := 1 .. 5
ORIGIN := 1
x[1] := 2.0
y[1] := 7.5
x[2] := 1.2
y[2] := 5.9
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x[3] := 1.8
y[3] := 7.0
x[4] := 1.9
y[4] := 8.0
x[5] := 1.1
y[5] := 5.0
# [plot: y[i] vs x[i]]
f(x, a, b) := a + b/x
S(a, b) := sum((f(x[i], a, b) - y[i])^2, i = 1 .. 5)
a := 1
b := 2
solve block
    # solver
    P := Minimize(S, a, b)
end solve block
P = [10.7448; -6.11371]
a := P*[1; 0]
b := P*[0; 1]
f1(t) := a + b/t
# [plot: f1(t), y[i] vs t, x[i]]
S1 := sum((y[k] - f1(x)[k])^2, k = 1 .. 5) = 0.477711
h(x, a, b) := 1/(a + b*x)
S(a, b) := sum((h(x[i], a, b) - y[i])^2, i = 1 .. 5)
a := 1
b := 2
P := Minimize(S, a, b)
P = [0.257817; -0.0652857]
a := P*[1; 0]
b := P*[0; 1]
h1(t) := 1/(a + b*t)
# [plot: h1(t), y[i] vs t, x[i]]
S2 := sum((y[k] - h1(x)[k])^2, k = 1 .. 5) = 0.669588
S1 > S2 → 0
