# Ковалев Данил ВКБ32 | Лабораторная работа №1
# Вариант 7
ε := 0.00001
y(x) := x - sin(x) - 0.25
# Отделение корней графически
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# Отделение корней программно
root(y(x), x, 0, 2) = 1.17123
MPD1(a, b, f, ε) :=
    return "Корней нет" if f(a)*f(b) > 0
    i ← 0
    while |b - a| > ε
        x ← (a + b)/2
        i ← i + 1
        break if f(x) == 0
        b ← x if f(a)*f(x) < 0
        a ← x otherwise
        M[i, 1] ← i
        M[i, 2] ← x
        M[i, 3] ← f(x)
    M
