# Модель Нельсона
# Исходные данные:
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# Общее кол-во тестов
N := 17
# Количество тестов с обнаружением дефектов программы
N0 := 12
# Решение задачи:
# надежность программного обеспечения по результатам испытаний
R := 1 - N0/N = 0.294118
# Вторая часть
R1 := 1 - (0.04*1 + 0.02*1 + 0.05*1 + 0.02*1 + 0.02*1 + 0.05*1 + 0.02*1 + 0.03*1 + 0.03*1 + 0.04*1 + 0.01*1 + 0.02*1 + 0.01*1 + 0.03*1 + 0.06*1 + 0.02*1 + 0.04*1) = 0.49
