# Эвристическая модель
# Исходные данные:
# количество ошибок, обнаруженных первой группой тестирующих
N1 := 29
# количество ошибок, обнаруженных второй группой тестирующих
N2 := 31
# количество ошибок, которые обнаружила и первая, и вторая группа (общие обнаруженные ошибки)
N12 := 4
# Первая часть:
# Решение задачи:
N := N1*N2/N12
N = 224.75
# Колличество не обнаруженных ошибок
N - N1 - N2 + N12 = 168.75
# Вторая часть:
# количество ошибок, обнаруженных первой группой тестирующих
n1 := 40
# количество ошибок, обнаруженных второй группой тестирующих
n2 := 20
# Количество ошибок до начала тестирования
n := 42
n12 := n1*n2/n = 19.0476
