# Модель Миллса Часть 2
# Исходные данные:
# Кол-во преднамеренно внесенных ошибок
W := 25
# В процессе четырех тестов было выявлено определенное количество ошибок
# Кол-во внесенных ошибок, обнаруженных в результате тестирования
V1 := 8
V2 := 7
V3 := 6
V4 := 4
V1 + V2 + V3 + V4 = 25
# Количество «собственных» ошибок в программе
S1 := 5
S2 := 4
S3 := 3
S4 := 4
# Колличество предпологаемых ошибок в программе
R := 18
S1 + S2 + S3 + S4 = 16
# Решение задачи
# Количество  ошибок перед  каждым  прогоном  будем  оценивать  в
# соответствии  с  выражением.
#
# Перед  каждой  последующей оценкой количества ошибок и  степени  отлаженное программы необходимо корректировать значения внесенных  W и предполагаемых r ошибок с учетом выявленных и устраненных после каждого прогона тестов.
#
# Степень  отлаженности  программы  на  всех  прогонах,  кроме
# последнего, рассчитывается по комбинаторной формуле.
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# Первый прогон
N1 := W*S1/V1
N1 = 15.625
2 - прогон
Корректировка
r2 := R - S1
r2 = 13
S2 = 4
W2 := W - V1
W2 = 17
N2 := W2*S2/V2
N2 = 9.71429
3 - прогон
Корретировка
r3 := r2 - S2
r3 = 9
S3 = 3
W3 := W2 - V2
W3 = 10
N3 := W3*S3/V3
N3 = 5
4 - прогон
Корректировка
r4 := r3 - S3
r4 = 6
S4 = 4
W4 := W3 - V3
W4 = 4
N4 := W4*S4/V4
N4 = 4
# Определить все ли посеянные ошибки найдены
Vobh11 := V1 = 8
Vobh12 := V1 + V2 = 15
Vobh13 := V1 + V2 + V3 = 21
W = 25  # Кол-во преднамеренно внесенных ошибок
Vobh14 := V1 + V2 + V3 + V4 = 25
# Определение степени отлаженности программы после каждого теста
1 - тест
# Исходные данные
# Кол-во преднамеренно внесенных ошибок
W = 25
# Кол-во ошибок, предпологаемых в программе
R = 18
V1 = 8
# Выявлено внесенных ошибок
# Обнаружено собственных
S1 = 5
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(V1 - 1)!*((S1 + R + 1)!*((R + V1) - (S1 + R + 1))!)/(S1!*((V1 - 1) - S1)!*(R + V1)!) = 0.0646154
C1 := (V1 - 1)!/(S1!*((V1 - 1) - S1)!)/((R + V1)!/((S1 + R + 1)!*((R + V1) - (S1 + R + 1))!))
C1 = 0.0646154
2 - тест
# Исходные данные
# Кол-во преднамеренно внесенных ошибок
W2 := W - V1 = 17
# Кол-во ошибок, предпологаемых в программе
R2 := R - S1 = 13
V2 = 7
# Выявлено внесенных ошибок
# Обнаружено собственных
S2 = 4
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((V2 - 1)!)*((S2 + R2 + 1)!*((R2 + V2) - (S2 + R2 + 1))!)/(S2!*((V2 - 1) - S2)!*(R2 + V2)!) = 0.0789474
C2 := (V2 - 1)!/(S2!*((V2 - 1) - S2)!)/((r2 + V2)!/((S2 + r2 + 1)!*((r2 + V2) - (S2 + r2 + 1))!))
C2 = 0.0789474
3 - тест
# Исходные данные
# Кол-во преднамеренно внесенных ошибок
W3 := W2 - V2 = 10
# Кол-во ошибок, предпологаемых в программе
R3 := R2 - S2 = 9
V3 = 6
# Выявлено внесенных ошибок
# Обнаружено собственных
S3 = 3
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C3 := (V3 - 1)!/(S3!*((V3 - 1) - S3)!)/((R3 + V3)!/((S3 + R3 + 1)!*((R3 + V3) - (S3 + R3 + 1))!)) = 0.0952381
S3 + R3 + 1 = 13
(R3 + V3) - (S3 + R3 + 1) = 2
C3 = 0.0952381
4 - тест
# Исходные данные
# Кол-во преднамеренно внесенных ошибок
W4 := W3 - V3 = 4
# Кол-во ошибок, предпологаемых в программе
R4 := R3 - S3 = 6
V4 = 4
# Выявлено внесенных ошибок
# Обнаружено собственных
S4 = 4
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(V4 - 1)!*((S4 + R4 + 1)!*((R4 + V4) - (S4 + R4 + 1))!) =  # error: Функция не определена в одной или нескольких точках. Возможно, вы делите на ноль.
C5 := (V4 - 1)!*((S4 + R4 + 1)!*((R4 + V4) - (S4 + R4 + 1))!)/(S4!*((V4 - 1) - S4)!*(R4 + V4)!)  # error: Функция не определена в одной или нескольких точках. Возможно, вы делите на ноль.
S4!*((V4 - 1) - S4)!*(R4 + V4)! =  # error
C5 =  # error: Эта переменная не определена. Проверьте правильность установки обозначения.
# Все внесенные ошибки обнаружены и устранены - применяем упрощенную формулу
С4 := W4/(W4 + R4 + 1) = 0.363636
