# Модель Миллса
# Исходные данные
# Кол-во преднамеренно внесенных ошибок
W := 18
# Кол-во ошибок, обнаруженных в результате тестирования
V := 22
# Кол-во предполагаемых ошибок
R := 4
# Решение
# 1) Определим количество «собственных» ошибок в программе , S
S := V - W
S = 4
# 2) Получим оценку количества ошибок
N := W*S/V
N = 3.27273
# Таким образом, из результатов тестирования следует, что до начала тестирования в программе имелось  ошибок.
N = 3.27273
# Определение степени отлаженности программы:
C :=
    if S > R
        1
    else
        W/(W + R + 1)
C = 0.782609
