# Модель Шумана
# Исходные данные:
# Кол-во машинных команд (строк)
I := 1985
# Кол-во ошибок после отладки
M := 56
# Кол-во дней тестирования
t := 12
# Кол-во обнаруженных ошибок после тестирования
x := 25
# Коэффициент пропорциональности
C1 := 0.7
# Решение
# 1) Расчитываем кол-во ошибок в расчете на одну команду в машинном языке
E1 := x/I
E1 = 0.0125945
# 2) Расчитываем удельное число ошибок на одну машинную команду, оставшихся в системе после времени тестирования
E2 := M/I - E1
E2 = 0.0156171
# 3) Расчитываем вероятность безотказной работы на интервале от 0 до t
P := e^(-C1*((M/I) - E1)*t)
P = 0.877056
# 4) Расчитываем среднее время безошибочной работы программы
tcp := 1/(C1*((M/I) - E1))
M/I = 0.0282116
tcp = 91.4747
(M/I) - E1 = 0.0156171
# 5) Расчитываем интенсивность отказов программы
λ := C1*E2
λ = 0.010932
