# Модель Миллса
# Исходные данные
# Кол-во преднамеренно внесенных ошибок
W := 17
# Кол-во ошибок, обнаруженных в результате тестирования
V := 23
# Кол-во предполагаемых ошибок
R := 7
# Решение
# 1) Определим количество «собственных» ошибок в программе , S
S := V - W
S = 6
# 2) Получим оценку количества ошибок
N := W*S/V
N = 4.43478
# Таким образом, из результатов тестирования следует, что до начала тестирования в программе имелось  ошибок.
N = 4.43478
# Определение степени отлаженности программы:
C :=
    if S > R
        1
    else
        W/(W + R + 1)
C = 0.68
