# Модель Миллса
# Исходные данные
# Кол-во преднамеренно внесенных ошибок
W := 6
# Кол-во ошибок, обнаруженных в результате тестирования
V := 7
# Кол-во предполагаемых ошибок
R := 1
# Решение
# 1) Определим количество «собственных» ошибок в программе , S
S := V - W
S = 1
# 2) Получим оценку количества ошибок
N := W*S/V
# Грубо говоря, тут можно сказать, что 0 ошибок, так как меньше < 1
N = 0.857143
# Таким образом, из результатов тестирования следует, что до начала тестирования в программе имелось  ошибок.
N = 0.857143
# Определение степени отлаженности программы:
C :=
    if S > R
        1
    else
        W/(W + R + 1)
C = 0.75
