# Модель Миллса
# Исходные данные
# Кол-во преднамеренно внесенных ошибок
W := 13
# Кол-во ошибок, обнаруженных в результате тестирования
V := 14
# Кол-во предполагаемых ошибок
R := 4
# Решение
# 1) Определим количество «собственных» ошибок в программе , S
S := V - W
S = 1
# 2) Получим оценку количества ошибок
N := W*S/V
N = 0.928571
# Таким образом, из результатов тестирования следует, что до начала тестирования в программе имелось  ошибок.
N = 0.928571
# Определение степени отлаженности программы:
C :=
    if S > R
        1
    else
        W/(W + R + 1)
C = 0.722222
