# Модель Миллса Часть 2
# Исходные данные:
# Кол-во преднамеренно внесенных ошибок
W := 37
# В процессе четырех тестов было выявлено определенное количество ошибок
# Кол-во внесенных ошибок, обнаруженных в результате тестирования
V1 := 15
V2 := 10
V3 := 9
V4 := 3
V1 + V2 + V3 + V4 = 37
# Количество «собственных» ошибок в программе
S1 := 8
S2 := 5
S3 := 4
S4 := 2
# Колличество предпологаемых ошибок в программе
R := 22
S1 + S2 + S3 + S4 = 19
# Решение задачи
# Количество  ошибок перед  каждым  прогоном  будем  оценивать  в
# соответствии  с  выражением.
#
# Перед  каждой  последующей оценкой количества ошибок и  степени  отлаженное программы необходимо корректировать значения внесенных  W и предполагаемых r ошибок с учетом выявленных и устраненных после каждого прогона тестов.
#
# Степень  отлаженности  программы  на  всех  прогонах,  кроме
# последнего, рассчитывается по комбинаторной формуле.
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# Первый прогон
N1 := W*S1/V1
N1 = 19.7333
2 - прогон
Корректировка
r2 := R - S1
r2 = 14
S2 = 5
W2 := W - V1
W2 = 22
N2 := W2*S2/V2
N2 = 11
3 - прогон
Корретировка
r3 := r2 - S2
r3 = 9
S3 = 4
W3 := W2 - V2
W3 = 12
N3 := W3*S3/V3
N3 = 5.33333
4 - прогон
Корректировка
r4 := r3 - S3
r4 = 5
S4 = 2
W4 := W3 - V3
W4 = 3
N4 := W4*S4/V4
N4 = 2
# Определить все ли посеянные ошибки найдены
Vobh11 := V1 = 15
Vobh12 := V1 + V2 = 25
Vobh13 := V1 + V2 + V3 = 34
W = 37  # Кол-во преднамеренно внесенных ошибок
Vobh14 := V1 + V2 + V3 + V4 = 37
# Определение степени отлаженности программы после каждого теста
1 - тест
# Исходные данные
# Кол-во преднамеренно внесенных ошибок
W = 37
# Кол-во ошибок, предпологаемых в программе
R = 22
V1 = 15
# Выявлено внесенных ошибок
# Обнаружено собственных
S1 = 8
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(V1 - 1)!*((S1 + R + 1)!*((R + V1) - (S1 + R + 1))!)/(S1!*((V1 - 1) - S1)!*(R + V1)!) = 0.00129173
C1 := (V1 - 1)!/(S1!*((V1 - 1) - S1)!)/((R + V1)!/((S1 + R + 1)!*((R + V1) - (S1 + R + 1))!))
C1 = 0.00129173
2 - тест
# Исходные данные
# Кол-во преднамеренно внесенных ошибок
W2 := W - V1 = 22
# Кол-во ошибок, предпологаемых в программе
R2 := R - S1 = 14
V2 = 10
# Выявлено внесенных ошибок
# Обнаружено собственных
S2 = 5
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((V2 - 1)!)*((S2 + R2 + 1)!*((R2 + V2) - (S2 + R2 + 1))!)/(S2!*((V2 - 1) - S2)!*(R2 + V2)!) = 0.0118577
C2 := (V2 - 1)!/(S2!*((V2 - 1) - S2)!)/((r2 + V2)!/((S2 + r2 + 1)!*((r2 + V2) - (S2 + r2 + 1))!))
C2 = 0.0118577
3 - тест
# Исходные данные
# Кол-во преднамеренно внесенных ошибок
W3 := W2 - V2 = 12
# Кол-во ошибок, предпологаемых в программе
R3 := R2 - S2 = 9
V3 = 9
# Выявлено внесенных ошибок
# Обнаружено собственных
S3 = 4
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C3 := (V3 - 1)!/(S3!*((V3 - 1) - S3)!)/((R3 + V3)!/((S3 + R3 + 1)!*((R3 + V3) - (S3 + R3 + 1))!)) = 0.0228758
S3 + R3 + 1 = 14
(R3 + V3) - (S3 + R3 + 1) = 4
C3 = 0.0228758
4 - тест
# Исходные данные
# Кол-во преднамеренно внесенных ошибок
W4 := W3 - V3 = 3
# Кол-во ошибок, предпологаемых в программе
R4 := R3 - S3 = 5
V4 = 3
# Выявлено внесенных ошибок
# Обнаружено собственных
S4 = 2
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(V4 - 1)!*((S4 + R4 + 1)!*((R4 + V4) - (S4 + R4 + 1))!) = 80640
C5 := (V4 - 1)!*((S4 + R4 + 1)!*((R4 + V4) - (S4 + R4 + 1))!)/(S4!*((V4 - 1) - S4)!*(R4 + V4)!)
S4!*((V4 - 1) - S4)!*(R4 + V4)! = 80640
C5 = 1
# Все внесенные ошибки обнаружены и устранены - применяем упрощенную формулу
С4 := W4/(W4 + R4 + 1) = 0.333333
