# Модель Миллса
# Исходные данные
# Кол-во преднамеренно внесенных ошибок
W := 12
# Кол-во ошибок, обнаруженных в результате тестирования
V := 22
# Кол-во предполагаемых ошибок
R := 5
# Решение
# 1) Определим количество «собственных» ошибок в программе , S
S := V - W
S = 10
# 2) Получим оценку количества ошибок
N := W*S/V
N = 5.45455
# Таким образом, из результатов тестирования следует, что до начала тестирования в программе имелось  ошибок.
N = 5.45455
# Определение степени отлаженности программы:
C :=
    if S > R
        1
    else
        W/(W + R + 1)
C = 1
