# Модель Миллса Часть 2
# Исходные данные:
# Кол-во преднамеренно внесенных ошибок
W := 15
# В процессе четырех тестов было выявлено определенное количество ошибок
# Кол-во внесенных ошибок, обнаруженных в результате тестирования
V1 := 6
V2 := 4
V3 := 3
V4 := 2
V1 + V2 + V3 + V4 = 15
# Количество «собственных» ошибок в программе
S1 := 3
S2 := 2
S3 := 1
S4 := 1
# Колличество предпологаемых ошибок в программе
R := 8
S1 + S2 + S3 + S4 = 7
# Решение задачи
# Количество  ошибок перед  каждым  прогоном  будем  оценивать  в
# соответствии  с  выражением.
#
# Перед  каждой  последующей оценкой количества ошибок и  степени  отлаженное программы необходимо корректировать значения внесенных  W и предполагаемых r ошибок с учетом выявленных и устраненных после каждого прогона тестов.
#
# Степень  отлаженности  программы  на  всех  прогонах,  кроме
# последнего, рассчитывается по комбинаторной формуле.
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# Первый прогон
N1 := W*S1/V1
N1 = 7.5
2 - прогон
Корректировка
r2 := R - S1
r2 = 5
S2 = 2
W2 := W - V1
W2 = 9
N2 := W2*S2/V2
N2 = 4.5
3 - прогон
Корретировка
r3 := r2 - S2
r3 = 3
S3 = 1
W3 := W2 - V2
W3 = 5
N3 := W3*S3/V3
N3 = 1.66667
4 - прогон
Корректировка
r4 := r3 - S3
r4 = 2
S4 = 1
W4 := W3 - V3
W4 = 2
N4 := W4*S4/V4
N4 = 1
# Определить все ли посеянные ошибки найдены
Vobh11 := V1 = 6
Vobh12 := V1 + V2 = 10
Vobh13 := V1 + V2 + V3 = 13
W = 15  # Кол-во преднамеренно внесенных ошибок
Vobh14 := V1 + V2 + V3 + V4 = 15
# Определение степени отлаженности программы после каждого теста
1 - тест
# Исходные данные
# Кол-во преднамеренно внесенных ошибок
W = 15
# Кол-во ошибок, предпологаемых в программе
R = 8
V1 = 6
# Выявлено внесенных ошибок
# Обнаружено собственных
S1 = 3
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(V1 - 1)!*((S1 + R + 1)!*((R + V1) - (S1 + R + 1))!)/(S1!*((V1 - 1) - S1)!*(R + V1)!) = 0.10989
C1 := (V1 - 1)!/(S1!*((V1 - 1) - S1)!)/((R + V1)!/((S1 + R + 1)!*((R + V1) - (S1 + R + 1))!))
C1 = 0.10989
2 - тест
# Исходные данные
# Кол-во преднамеренно внесенных ошибок
W2 := W - V1 = 9
# Кол-во ошибок, предпологаемых в программе
R2 := R - S1 = 5
V2 = 4
# Выявлено внесенных ошибок
# Обнаружено собственных
S2 = 2
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((V2 - 1)!)*((S2 + R2 + 1)!*((R2 + V2) - (S2 + R2 + 1))!)/(S2!*((V2 - 1) - S2)!*(R2 + V2)!) = 0.333333
C2 := (V2 - 1)!/(S2!*((V2 - 1) - S2)!)/((r2 + V2)!/((S2 + r2 + 1)!*((r2 + V2) - (S2 + r2 + 1))!))
C2 = 0.333333
3 - тест
# Исходные данные
# Кол-во преднамеренно внесенных ошибок
W3 := W2 - V2 = 5
# Кол-во ошибок, предпологаемых в программе
R3 := R2 - S2 = 3
V3 = 3
# Выявлено внесенных ошибок
# Обнаружено собственных
S3 = 1
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C3 := (V3 - 1)!/(S3!*((V3 - 1) - S3)!)/((R3 + V3)!/((S3 + R3 + 1)!*((R3 + V3) - (S3 + R3 + 1))!)) = 0.333333
S3 + R3 + 1 = 5
(R3 + V3) - (S3 + R3 + 1) = 1
C3 = 0.333333
4 - тест
# Исходные данные
# Кол-во преднамеренно внесенных ошибок
W4 := W3 - V3 = 2
# Кол-во ошибок, предпологаемых в программе
R4 := R3 - S3 = 2
V4 = 2
# Выявлено внесенных ошибок
# Обнаружено собственных
S4 = 1
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(V4 - 1)!*((S4 + R4 + 1)!*((R4 + V4) - (S4 + R4 + 1))!) = 24
C5 := (V4 - 1)!*((S4 + R4 + 1)!*((R4 + V4) - (S4 + R4 + 1))!)/(S4!*((V4 - 1) - S4)!*(R4 + V4)!)
S4!*((V4 - 1) - S4)!*(R4 + V4)! = 24
C5 = 1
# Все внесенные ошибки обнаружены и устранены - применяем упрощенную формулу
С4 := W4/(W4 + R4 + 1) = 0.4
