# Модель Шумана
# Исходные данные:
# Кол-во машинных команд (строк)
I := 1784
# Кол-во ошибок после отладки
M := 26
# Кол-во дней тестирования
t := 54
# Кол-во обнаруженных ошибок после тестирования
x := 24
# Коэффициент пропорциональности
C1 := 0.7
# Решение
# 1) Расчитываем кол-во ошибок в расчете на одну команду в машинном языке
E1 := x/I
E1 = 0.0134529
# 2) Расчитываем удельное число ошибок на одну машинную команду, оставшихся в системе после времени тестирования
E2 := M/I - E1
E2 = 0.00112108
# 3) Расчитываем вероятность безотказной работы на интервале от 0 до t
P := e^(-C1*((M/I) - E1)*t)
P = 0.958509
# 4) Расчитываем среднее время безошибочной работы программы
tcp := 1/(C1*((M/I) - E1))
M/I = 0.014574
tcp = 1274.29
(M/I) - E1 = 0.00112108
# 5) Расчитываем интенсивность отказов программы
λ := C1*E2
λ = 0.000784753
