# Модель Миллса Часть 2
i := 0 .. 3
# Исходные данные:
# Кол-во преднамеренно внесенных ошибок
W[0] := 25
# В процессе четырех тестов было выявлено определенное количество ошибок
# Кол-во внесенных ошибок, обнаруженных в результате тестирования
# [component: outputs V]
sum(V[i], i = 0 .. 3) = 25
# Количество «собственных» ошибок в программе
# [component: outputs S]
sum(S[i], i = 0 .. 3) = 16
# Колличество предпологаемых ошибок в программе
R := 18
# Решение задачи
# Количество  ошибок перед  каждым  прогоном  будем  оценивать  в
# соответствии  с  выражением.
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# Перед  каждой  последующей оценкой количества ошибок и  степени  отлаженное программы необходимо корректировать значения внесенных  W и предполагаемых r ошибок с учетом выявленных и устраненных после каждого прогона тестов.
#
# Степень  отлаженности  программы  на  всех  прогонах,  кроме
# последнего, рассчитывается по комбинаторной формуле.
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# Первый прогон
2 - прогон
Корректировка
r[1] := R - S[1]
r[1] = 14
S[1] = 4
N[0] := W*S[0]/V[0]
N[0] = [15.625]
W[1] := W[0] - V[0]
W[1] = 17
N[1] := W[1]*S[1]/V[1]
N[1] = 9.71429
3 - прогон
4 - прогон
# Корретировка | Корректировка
r[2] := r[1] - S[2]
r[2] = 11
r[3] := r[2] - S[3]
S[2] = 3
r[3] = 7
S[3] = 4
W[2] := W[1] - V[1]
W[2] = 10
W[3] := W[2] - V[2]
W[3] = 4
N[2] := W[2]*S[2]/V[2]
N[2] = 5
N[3] := W[3]*S[3]/V[3]
N[3] = 4
# Определить все ли посеянные ошибки найдены
Vobh11 := V[0] = 8
Vobh12 := V[0] + V[1] = 15
W = [25; 17; 10; 4]  # Кол-во преднамеренно внесенных ошибок
Vobh13 := V[0] + V[1] + V[2] = 21
Vobh14 := V[0] + V[1] + V[2] + V[3] = 25
# Определение степени отлаженности программы после каждого теста
1 - тест
# Исходные данные
W = [25; 17; 10; 4]
# Кол-во преднамеренно внесенных ошибок
# Кол-во ошибок, предпологаемых в программе
R = 18
# Выявлено внесенных ошибок
V[0] = 8
# Обнаружено собственных
S1 =  # error: Эта переменная не определена.
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(V1 - 1)!*((S1 + R + 1)!*((R + V1) - (S1 + R + 1))!)/(S1!*((V1 - 1) - S1)!*(R + V1)!) =  # error
C1 := (V1 - 1)!/(S1!*((V1 - 1) - S1)!)/((R + V1)!/((S1 + R + 1)!*((R + V1) - (S1 + R + 1))!))
(S[i] - 1)! = [24; 6; 2; 6]
C1 =  # error
2 - тест
# Исходные данные
# Кол-во преднамеренно внесенных ошибок
W2 := W - V1
# Кол-во ошибок, предпологаемых в программе
R2 := R - S1
# Выявлено внесенных ошибок
V2 =  # error
# Обнаружено собственных
S2 =  # error
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((V2 - 1)!)*((S2 + R2 + 1)!*((R2 + V2) - (S2 + R2 + 1))!)/(S2!*((V2 - 1) - S2)!*(R2 + V2)!) =  # error
C2 := (V2 - 1)!/(S2!*((V2 - 1) - S2)!)/((r2 + V2)!/((S2 + r2 + 1)!*((r2 + V2) - (S2 + r2 + 1))!))
C2 =  # error
3 - тест
# Исходные данные
# Кол-во преднамеренно внесенных ошибок
W3 := W2 - V2
# Кол-во ошибок, предпологаемых в программе
R3 := R2 - S2
# Выявлено внесенных ошибок
V3 =  # error
# Обнаружено собственных
S3 =  # error
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C3 := (V3 - 1)!/(S3!*((V3 - 1) - S3)!)/((R3 + V3)!/((S3 + R3 + 1)!*((R3 + V3) - (S3 + R3 + 1))!))
S3 + R3 + 1 =  # error
(R3 + V3) - (S3 + R3 + 1) =  # error
C3 =  # error
4 - тест
# Исходные данные
# Кол-во преднамеренно внесенных ошибок
W4 := W3 - V3
# Кол-во ошибок, предпологаемых в программе
R4 := R3 - S3
# Выявлено внесенных ошибок
V4 =  # error
# Обнаружено собственных
S4 =  # error
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(V4 - 1)!*((S4 + R4 + 1)!*((R4 + V4) - (S4 + R4 + 1))!) =  # error
C5 := (V4 - 1)!*((S4 + R4 + 1)!*((R4 + V4) - (S4 + R4 + 1))!)/(S4!*((V4 - 1) - S4)!*(R4 + V4)!)
S4!*((V4 - 1) - S4)!*(R4 + V4)! =  # error
C5 =  # error
# Все внесенные ошибки обнаружены и устранены - применяем упрощенную формулу
С4 := W4/(W4 + R4 + 1)
