# Модель Шумана
# Исходные данные:
# Кол-во машинных команд (строк)
I := 2023
# Кол-во ошибок после отладки
M := 23
# Кол-во дней тестирования
t := 28
# Кол-во обнаруженных ошибок после тестирования
x := 11
# Коэффициент пропорциональности
C1 := 0.7
# Решение
# 1) Расчитываем кол-во ошибок в расчете на одну команду в машинном языке
E1 := x/I
E1 = 0.00543747
# 2) Расчитываем удельное число ошибок на одну машинную команду, оставшихся в системе после времени тестирования
E2 := M/I - E1
E2 = 0.00593178
# 3) Расчитываем вероятность безотказной работы на интервале от 0 до t
P := e^(-C1*((M/I) - E1)*t)
P = 0.890241
# 4) Расчитываем среднее время безошибочной работы программы
tcp := 1/(C1*((M/I) - E1))
M/I = 0.0113693
(M/I) - E1 = 0.00593178
tcp = 240.833
# 5) Расчитываем интенсивность отказов программы
λ := C1*E2
λ = 0.00415225
