# Исходные данные:
# Общее кол-во обнаруженных ошибок:
n := 2
# интервал продолжительности обнаружения первой ошибки
t[1] := 3
# интервал продолжительности обнаружения второй ошибки
t[2] := 5
# Проверка соблюдения условий модели t2 больше t1
sum(1/(N1 - i + 1), i = 1 .. n)/sum(t[i], i = 1 .. n) == n/(N1*sum(t[i], i = 1 .. n) - sum((i - 1)*t[i], i = 1 .. n)) solve, N1 → 5/2 = 2.5
