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# Шаг 1. Импорт контейнера и разложение на каналы R, G, B
# ORIGIN:=1 — нумерация массивов с единицы (как в приложении методички). C — контейнер (упакованный RGB). R, G, B — матрицы интенсивностей красного, зелёного и синего 0..255. X=rows(B) — высота, Y=cols(B) — ширина в пикселях.
ORIGIN := 1
# Контейнер (оригинал)
C := READRGB("container.bmp")
C = [
    41, 41, 41, 41, 41, 41, 41, 41, 41, 41, 41, 41;
    42, 42, 42, 42, 42, 42, 42, 42, 42, 42, 42, 42;
    43, 43, 43, 43, 43, 43, 43, 43, 43, 43, 43, 43;
    44, 44, 44, 44, 44, 44, 44, 44, 44, 44, 44, 44;
    45, 45, 45, 45, 45, 45, 45, 45, 45, 45, 45, 45;
    46, 46, 46, 46, 46, 46, 46, 46, 46, 46, 46, 46;
    47, 47, 47, 47, 47, 47, 47, 47, 47, 47, 47, 47;
    48, 48, 48, 48, 48, 48, 48, 48, 48, 48, 48, 48;
    49, 49, 49, 49, 49, 49, 49, 49, 49, 49, 49, 49;
    50, 50, 50, 50, 50, 50, 50, 50, 50, 50, 50, 50;
    51, 51, 51, 51, 51, 51, 51, 51, 51, 51, 51, 51;
    52, 52, 52, 52, 52, 52, 52, 52, 52, 52, 52, 52
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]
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R := READ_RED("container.bmp")
G := READ_GREEN("container.bmp")
B := READ_BLUE("container.bmp")
X := rows(B)
# Stego (заполненный контейнер)
Y := cols(B)
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R = [
    41, 41, 41, 41, 41, 41, 41, 41, 41, 41, 41, 41;
    42, 42, 42, 42, 42, 42, 42, 42, 42, 42, 42, 42;
    43, 43, 43, 43, 43, 43, 43, 43, 43, 43, 43, 43;
    44, 44, 44, 44, 44, 44, 44, 44, 44, 44, 44, 44;
    45, 45, 45, 45, 45, 45, 45, 45, 45, 45, 45, 45;
    46, 46, 46, 46, 46, 46, 46, 46, 46, 46, 46, 46;
    47, 47, 47, 47, 47, 47, 47, 47, 47, 47, 47, 47;
    48, 48, 48, 48, 48, 48, 48, 48, 48, 48, 48, 48;
    49, 49, 49, 49, 49, 49, 49, 49, 49, 49, 49, 49;
    50, 50, 50, 50, 50, 50, 50, 50, 50, 50, 50, 50;
    51, 51, 51, 51, 51, 51, 51, 51, 51, 51, 51, 51;
    52, 52, 52, 52, 52, 52, 52, 52, 52, 52, 52, 52
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]
X = 128
Y = 128
# Шаг 2. Матрица яркости λ и параметры метода | Скрытый сигнал |B'-B|, усилен
# λ — яркость каждого пикселя по BT.601: λ=0.2989·R+0.58662·G+0.11448·B. Именно на λ масштабируется сила встраивания. v=0.15 — энергия сигнала, τ=15 — кратность встраивания одного бита, Rr=4 — число шагов псевдослучайной прогулки, σ=3 — радиус креста при извлечении, Ko=125 — стартовое зерно ключа.
G = [
    61, 61, 62, 62, 63, 63, 64, 64, 65, 65, 66, 66;
    61, 62, 62, 63, 63, 64, 64, 65, 65, 66, 66, 67;
    62, 62, 63, 63, 64, 64, 65, 65, 66, 66, 67, 67;
    62, 63, 63, 64, 64, 65, 65, 66, 66, 67, 67, 68;
    63, 63, 64, 64, 65, 65, 66, 66, 67, 67, 68, 68;
    63, 64, 64, 65, 65, 66, 66, 67, 67, 68, 68, 69;
    64, 64, 65, 65, 66, 66, 67, 67, 68, 68, 69, 69;
    64, 65, 65, 66, 66, 67, 67, 68, 68, 69, 69, 70;
    65, 65, 66, 66, 67, 67, 68, 68, 69, 69, 70, 70;
    65, 66, 66, 67, 67, 68, 68, 69, 69, 70, 70, 71;
    66, 66, 67, 67, 68, 68, 69, 69, 70, 70, 71, 71;
    66, 67, 67, 68, 68, 69, 69, 70, 70, 71, 71, 72
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]
λ := 0.2989*R + 0.58662*G + 0.11448*B
v := 0.15
τ := 15
Rr := 4
σ := 3
B = [
    81, 82, 83, 84, 85, 86, 87, 88, 89, 90, 91, 92;
    81, 82, 83, 84, 85, 86, 87, 88, 89, 90, 91, 92;
    81, 82, 83, 84, 85, 86, 87, 88, 89, 90, 91, 92;
    81, 82, 83, 84, 85, 86, 87, 88, 89, 90, 91, 92;
    81, 82, 83, 84, 85, 86, 87, 88, 89, 90, 91, 92;
    81, 82, 83, 84, 85, 86, 87, 88, 89, 90, 91, 92;
    81, 82, 83, 84, 85, 86, 87, 88, 89, 90, 91, 92;
    81, 82, 83, 84, 85, 86, 87, 88, 89, 90, 91, 92;
    81, 82, 83, 84, 85, 86, 87, 88, 89, 90, 91, 92;
    81, 82, 83, 84, 85, 86, 87, 88, 89, 90, 91, 92;
    81, 82, 83, 84, 85, 86, 87, 88, 89, 90, 91, 92;
    81, 82, 83, 84, 85, 86, 87, 88, 89, 90, 91, 92
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]
Ko := 125
# Шаг 3. Секретный ключ K — генератор псевдослучайной последовательности
# K — вектор из 2·Rr=8 «ключевых байтов». Метод серединных квадратов: K1=Ko; каждый следующий Ks — первые 3 цифры квадрата предыдущего; если результат >255 — берутся первые 2 цифры. K задаёт псевдослучайный обход пикселей и должен совпадать у отправителя и получателя.
K :=
    for s ∈ 1 .. 2*Rr
        if s == 1
            K[s] ← Ko
        if s > 1
            q ← K[s - 1]^2
            nd ← 1 + (10 ≤ q) + (100 ≤ q) + (1000 ≤ q) + (10000 ≤ q)
            K[s] ← floor(q/10^(nd - 3))
        if K[s] > 255
            q ← K[s]
            nd ← 1 + (10 ≤ q) + (100 ≤ q) + (1000 ≤ q) + (10000 ≤ q)
            K[s] ← floor(q/10^(nd - 2))
    K
K = [125; 156; 243; 59; 34; 115; 132; 174]
# Шаг 4. Служебные функции D2B, B2D, xor8
# D2B(x) — десятичное число в 8-битный вектор (младший бит первый). B2D(x) — обратно, вектор бит в число. xor8(a,b) — поразрядное исключающее ИЛИ двух 8-битных векторов (сложение бит по модулю 2). Используются в псевдослучайной прогулке по пикселям.
D2B(x) :=
    for i ∈ 1 .. 8
        V[i] ← mod(x, 2)
        x ← floor(x/2)
    V
B2D(x) := sum(x[i]*2^(i - 1), i = 1 .. 8)
xor8(a, b) :=
    for i ∈ 1 .. 8
        V[i] ← mod(a[i] + b[i], 2)
    V
# Шаг 5. Сообщение и его битовое представление
# M — скрываемое сообщение. Mvec — коды символов, Lm — длина. Mb — сообщение, развёрнутое в поток бит (по 8 на символ, всего Lm·8 бит). N=τ·Lm·8 — общее число операций встраивания.
M := "Pierre did not choose a career"
Mvec := str2vec(M)
Mvec = [80; 105; 101; 114; 114; 101; 32; 100; 105; 100; 32; 110; 111; 116; 32; 99; 104; 111; 111; 115; 101; 32; 97; 32; 99; 97; 114; 101; 101; 114]
Lm := strlen(M)
Mb :=
    b ← D2B(Mvec[1])
    for k ∈ 2 .. Lm
        b ← stack(b, D2B(Mvec[k]))
    b
Lm = 30
Mb = [
    0; 0; 0; 0; 1; 0; 1; 0; 1; 0
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]
N := τ*Lm*8
N = 3600
Lm = 30
N = 3600
# Шаг 6. Встраивание битов в синюю компоненту (B → B')
# B' — изменённый синий канал. Для каждого из N встраиваний псевдослучайная прогулка (Rr шагов на ключе K и XOR с координатами) выбирает пиксель (x,y); бит «1» повышает синий на v·λ, бит «0» понижает: B'=B+(2·бит−1)·v·λ. Значения ограничиваются 0..255. Каждый бит встраивается τ раз для надёжности.
Bp :=
    Bp ← B
    for i ∈ 1 .. N
        x ← floor(i/Y) + 1
        y ← mod(i, Y) + 1
        for s ∈ 1 .. Rr
            x ← mod(x + B2D(xor8(D2B(K[2*s - 1]), D2B(y))), X) + 1
            y ← mod(y + B2D(xor8(D2B(K[2*s]), D2B(x))), Y) + 1
        j ← ceil(i/τ)
        Bp[x, y] ← round(B[x, y] + (2*Mb[j] - 1)*v*λ[x, y])
        if Bp[x, y] > 255
            Bp[x, y] ← 255
        if Bp[x, y] < 0
            Bp[x, y] ← 0
    Bp
Bp = [
    90, 82, 83, 84, 94, 77, 96, 88, 89, 90, 91, 92;
    81, 82, 74, 75, 85, 86, 87, 88, 89, 90, 91, 92;
    72, 82, 83, 84, 94, 86, 87, 88, 89, 90, 91, 92;
    81, 82, 83, 84, 85, 86, 87, 88, 89, 90, 100, 92;
    81, 82, 83, 75, 85, 86, 87, 79, 89, 90, 91, 92;
    72, 73, 83, 84, 76, 77, 87, 88, 89, 90, 81, 92;
    81, 91, 74, 75, 85, 77, 78, 78, 89, 90, 91, 92;
    90, 91, 92, 75, 76, 76, 87, 88, 89, 90, 91, 92;
    81, 82, 83, 84, 85, 86, 87, 88, 89, 90, 91, 92;
    81, 82, 83, 84, 85, 86, 87, 88, 89, 90, 91, 92;
    81, 82, 83, 84, 85, 86, 87, 88, 89, 90, 91, 92;
    81, 82, 83, 84, 85, 86, 87, 88, 89, 90, 81, 102
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]
S := augment(R, G, Bp)
S = [
    41, 41, 41, 41, 41, 41, 41, 41, 41, 41, 41, 41;
    42, 42, 42, 42, 42, 42, 42, 42, 42, 42, 42, 42;
    43, 43, 43, 43, 43, 43, 43, 43, 43, 43, 43, 43;
    44, 44, 44, 44, 44, 44, 44, 44, 44, 44, 44, 44;
    45, 45, 45, 45, 45, 45, 45, 45, 45, 45, 45, 45;
    46, 46, 46, 46, 46, 46, 46, 46, 46, 46, 46, 46;
    47, 47, 47, 47, 47, 47, 47, 47, 47, 47, 47, 47;
    48, 48, 48, 48, 48, 48, 48, 48, 48, 48, 48, 48;
    49, 49, 49, 49, 49, 49, 49, 49, 49, 49, 49, 49;
    50, 50, 50, 50, 50, 50, 50, 50, 50, 50, 50, 50;
    51, 51, 51, 51, 51, 51, 51, 51, 51, 51, 51, 51;
    52, 52, 52, 52, 52, 52, 52, 52, 52, 52, 52, 52
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]
# Шаг 7. Подготовка к извлечению (вслепую)
# Bb — синий канал заполненного контейнера (в памяти совпадает с B'). Получатель не имеет оригинала: X1, Y1 — размеры, σ=3 — радиус креста для прогноза яркости синего по соседям.
Bb := Bp
X1 := rows(Bb)
X1 = 128
Y1 := cols(Bb)
Y1 = 128
Bb = [
    90, 82, 83, 84, 94, 77, 96, 88, 89, 90, 91, 92;
    81, 82, 74, 75, 85, 86, 87, 88, 89, 90, 91, 92;
    72, 82, 83, 84, 94, 86, 87, 88, 89, 90, 91, 92;
    81, 82, 83, 84, 85, 86, 87, 88, 89, 90, 100, 92;
    81, 82, 83, 75, 85, 86, 87, 79, 89, 90, 91, 92;
    72, 73, 83, 84, 76, 77, 87, 88, 89, 90, 81, 92;
    81, 91, 74, 75, 85, 77, 78, 78, 89, 90, 91, 92;
    90, 91, 92, 75, 76, 76, 87, 88, 89, 90, 91, 92;
    81, 82, 83, 84, 85, 86, 87, 88, 89, 90, 91, 92;
    81, 82, 83, 84, 85, 86, 87, 88, 89, 90, 91, 92;
    81, 82, 83, 84, 85, 86, 87, 88, 89, 90, 91, 92;
    81, 82, 83, 84, 85, 86, 87, 88, 89, 90, 81, 102
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]
# Шаг 8. Извлечение бит по кресту соседей и усреднению
# Тем же ключом K воспроизводится тот же обход пикселей. Для каждого носителя строится крест-прогноз синего p по соседям (радиус σ, с обработкой границ s1..s4). d — усреднённая по τ разность «факт − прогноз»; d>0 → бит 1, иначе 0. Mvb — восстановленный поток бит.
Mvb :=
    t ← 0
    for i ∈ 1 .. N
        x ← floor(i/Y) + 1
        y ← mod(i, Y) + 1
        for s ∈ 1 .. Rr
            x ← mod(x + B2D(xor8(D2B(K[2*s - 1]), D2B(y))), X) + 1
            y ← mod(y + B2D(xor8(D2B(K[2*s]), D2B(x))), Y) + 1
        if σ < x and x ≤ X1 - σ
            s1 ← 0 - σ
            s2 ← σ
        if x ≤ σ
            s1 ← 1 - x
            s2 ← σ
        if x > X1 - σ
            s1 ← 0 - σ
            s2 ← X1 - x
        if σ < y and y ≤ Y1 - σ
            s3 ← 0 - σ
            s4 ← σ
        if y ≤ σ
            s3 ← 1 - y
            s4 ← σ
        if y > Y1 - σ
            s3 ← 0 - σ
            s4 ← Y1 - y
        t ← t + 1
        est[t] ← (sum(Bb[x + a, y], a = s1 .. s2) + sum(Bb[x, y + a], a = s3 .. s4) - 2*Bb[x, y])/(s2 - s1 + s4 - s3)
        act[t] ← Bb[x, y]
        if τ ≤ t
            j ← ceil(i/τ)
            d ← 1/τ*sum(act[T] - est[T], T = 1 .. τ)
            if d ≤ 0
                Mvb[j] ← 0
            if d > 0
                Mvb[j] ← 1
            t ← 0
    Mvb
Mvb = [
    0; 0; 0; 0; 1; 0; 1; 0; 1; 0
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]
# Шаг 9. Сборка байтов, фильтр и восстановленное сообщение
# Mm — коды символов, собранные из потока бит по 8. Mf — после замены управляющего кода 31 на пробел (32). Recovered=vec2str(Mf) — восстановленный текст. err — число несовпавших байтов с оригиналом; err=0 подтверждает точное восстановление.
Mm :=
    for j ∈ 1 .. Lm
        Mm[j] ← B2D(submatrix(Mvb, 8*j - 7, 8*j, 1, 1))
    Mm
Mf :=
    for j ∈ 1 .. Lm
        if Mm[j] ≠ 31
            Mf[j] ← Mm[j]
        if Mm[j] == 31
            Mf[j] ← 32
    Mf
Recovered := vec2str(Mf)
Recovered = "Pierre did not choose a career"
err :=
    e ← 0
    for j ∈ 1 .. Lm
        if Mm[j] ≠ Mvec[j]
            e ← e + 1
    e
err = 0
vec2str(Mm) = "Pierre did not choose a career"
