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# Шаг 1. Импорт контейнера и разложение на цветовые каналы R, G, B
# ORIGIN:=0 задаёт нумерацию массивов с нуля. C — контейнер как упакованный массив трёх цветовых матриц. R, G, B — отдельные каналы (интенсивности красного, зелёного и синего) в виде числовых матриц со значениями 0..255.
ORIGIN := 0
C := READRGB("container.bmp")  # Контейнер (исходное изображение)
# Канал R (градации серого)
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R := READ_RED("container.bmp")
G := READ_GREEN("container.bmp")
B := READ_BLUE("container.bmp")
# Шаг 2-3. Импорт сообщения и параметры шифра Виженера
# M — сообщение, прочитанное как вектор байтов (коды символов cp1251). Na=256 — размер алфавита источника. K — секретный ключ Виженера, Nk — его длина, Nm — длина сообщения в байтах.
# Stego — контейнер со скрытым сообщением
# Канал G (градации серого)
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M := READBIN("prim.txt", "byte")
Na := 256
M = [
    204; 229; 242; 238; 228; 32; 231; 224; 236; 229
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]
K := "@JeKc-I980"
Nk := strlen(K)
Nk = 10
# Канал B (градации серого)
Nm := rows(M)
Nm = 393
# Модуль M.1 — расширение ключа на длину сообщения
# K1 — ключ, циклически растянутый на всю длину сообщения: K1[i] = K[i mod Nk]. Нужен, чтобы каждому символу сообщения соответствовал свой символ ключа.
K1 :=
    K ← str2vec(K)
    for i ∈ 0 .. Nm - 1
        r ← mod(i, Nk)
        K1[i] ← K[r]
    K1
K1 = [
    64; 74; 101; 75; 99; 45; 73; 57; 56; 48
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]
# Модуль M.2 — шифрование сообщения (mod 256)
# M_cod — шифротекст: к коду каждого символа прибавляется соответствующий символ ключа по модулю 256 (модифицированный шифр Виженера).
M_cod :=
    for j ∈ 0 .. Nm - 1
        M_cod[j] ← mod(M[j] + K1[j], Na)
    M_cod
M_cod = [
    12; 47; 87; 57; 71; 77; 48; 25; 36; 21
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]
# Шаг 4. Обрамление шифротекста метками начала и конца
# sMe — шифротекст, обрамлённый секретными метками начала (n0G@m0k) и конца (KiHeu,6). stack соединяет векторы по вертикали. Метки нужны, чтобы при извлечении найти границы сообщения.
m_start := "n0G@m0k"
m_end := "KiHeu,6"
sMe := stack(str2vec(m_start), M_cod, str2vec(m_end))
sMe = [
    110; 48; 71; 64; 109; 48; 107; 12; 47; 87
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]
Nk = 10
Nm = 393
submatrix(M, 0, 15, 0, 0) = [204; 229; 242; 238; 228; 32; 231; 224; 236; 229; 237; 251; 32; 237; 224; 232]
submatrix(M_cod, 0, 15, 0, 0) = [12; 47; 87; 57; 71; 77; 48; 25; 36; 21; 45; 69; 133; 56; 67; 21]
rows(sMe) = 407
8*rows(sMe) = 3256
3*rows(C)*cols(C) = 288000
# Модули M.3-M.4 — перевод двоичное <-> десятичное
# B2D переводит 8-битное двоичное число (вектор, младший разряд первый) в десятичное. D2B выполняет обратное преобразование — десятичное в вектор из 8 бит.
B2D(x) := sum(x[i]*2^i, i = 0 .. 7)
D2B(x) :=
    for i ∈ 0 .. 7
        V[i] ← mod(x, 2)
        x ← floor(x/2)
    V
# Модуль M.5 — развёртка контейнера в вектор (порядок B-G-R)
# Cv — контейнер, развёрнутый в один вектор. Порядок каналов временно меняется на B-G-R для защиты. augment соединяет матрицы по столбцам, stack — по вертикали.
Cv :=
    C1 ← augment(B, G, R)
    Cv ← C1[:, 0]
    for i ∈ 1 .. cols(C1) - 1
        Cv ← stack(Cv, C1[:, i])
    Cv
Cv = [
    13; 23; 62; 120; 163; 180; 190; 203; 208; 213; 214; 217
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]
rows(Cv) = 96000
# Модуль M.6 — встраивание битов сообщения в НЗБ
# Sv — вектор со встроенным сообщением. В младший бит каждого элемента пишется очередной бит sMe. После сообщения оставшиеся младшие биты заполняются случайно — это маскирует границу скрытых данных.
Sv :=
    for m ∈ 0 .. rows(sMe) - 1
        b ← D2B(sMe[m])
        for i ∈ 0 .. 7
            P ← D2B(Cv[i + 8*m])
            P[0] ← b[i]
            Sv[i + 8*m] ← B2D(P)
    for j ∈ rows(Sv) .. rows(Cv) - 1
        P ← D2B(Cv[j])
        P[0] ← round(rnd(1))
        Sv[j] ← B2D(P)
    Sv
Sv = [
    12; 23; 63; 121; 162; 181; 191; 202; 208; 212; 214; 216
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]
# Модули M.7-M.8 — свёртка вектора и восстановление каналов
# S1 — вектор Sv, свёрнутый обратно в матрицу размера контейнера. B_M, G_M, R_M — выделенные каналы; S — итоговый stego-контейнер с восстановленным порядком R-G-B.
S1 :=
    for i ∈ 0 .. cols(C) - 1
        S1[:, i] ← submatrix(Sv, i*rows(C), (i + 1)*rows(C) - 1, 0, 0)
    S1
S1 = [
    12, 5, 0, 3, 5, 2, 21, 44, 39, 45, 51, 46;
    23, 6, 0, 0, 0, 0, 12, 30, 39, 40, 40, 38;
    63, 37, 4, 1, 1, 1, 13, 19, 39, 35, 31, 30;
    121, 90, 53, 19, 11, 21, 29, 30, 42, 35, 33, 38;
    162, 140, 101, 65, 45, 47, 57, 60, 64, 59, 58, 66;
    181, 165, 139, 106, 83, 74, 85, 97, 114, 110, 111, 117;
    191, 180, 166, 148, 124, 108, 114, 131, 149, 150, 156, 160;
    202, 194, 188, 178, 156, 134, 136, 152, 156, 162, 172, 176;
    208, 207, 203, 190, 181, 176, 179, 180, 180, 180, 182, 185;
    212, 214, 211, 204, 195, 190, 191, 192, 193, 191, 190, 191;
    214, 217, 216, 213, 206, 202, 200, 200, 202, 202, 200, 197;
    216, 218, 218, 216, 212, 209, 208, 210, 207, 209, 205, 198
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]
B_M := submatrix(S1, 0, rows(C) - 1, 0, cols(C)/3 - 1)
G_M := submatrix(S1, 0, rows(C) - 1, cols(C)/3, 2*cols(C)/3 - 1)
R_M := submatrix(S1, 0, rows(C) - 1, 2*cols(C)/3, cols(C) - 1)
S := augment(R_M, G_M, B_M)
B_M = [
    12, 5, 0, 3, 5, 2, 21, 44, 39, 45, 51, 46;
    23, 6, 0, 0, 0, 0, 12, 30, 39, 40, 40, 38;
    63, 37, 4, 1, 1, 1, 13, 19, 39, 35, 31, 30;
    121, 90, 53, 19, 11, 21, 29, 30, 42, 35, 33, 38;
    162, 140, 101, 65, 45, 47, 57, 60, 64, 59, 58, 66;
    181, 165, 139, 106, 83, 74, 85, 97, 114, 110, 111, 117;
    191, 180, 166, 148, 124, 108, 114, 131, 149, 150, 156, 160;
    202, 194, 188, 178, 156, 134, 136, 152, 156, 162, 172, 176;
    208, 207, 203, 190, 181, 176, 179, 180, 180, 180, 182, 185;
    212, 214, 211, 204, 195, 190, 191, 192, 193, 191, 190, 191;
    214, 217, 216, 213, 206, 202, 200, 200, 202, 202, 200, 197;
    216, 218, 218, 216, 212, 209, 208, 210, 207, 209, 205, 198
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]
WRITERGB("container1.bmp", S) = 0
# ИЗВЛЕЧЕНИЕ. Модуль M.9 — развёртка stego в вектор
# Sv1 — stego-контейнер, развёрнутый в вектор так же, как при встраивании. С него начинается извлечение скрытого сообщения.
R1 := R_M
G1 := G_M
B1 := B_M
G_M = [
    38, 29, 22, 25, 19, 15, 28, 50, 42, 51, 57, 57;
    51, 31, 14, 8, 6, 10, 23, 37, 44, 47, 49, 46;
    91, 65, 30, 11, 8, 16, 24, 28, 47, 44, 42, 47;
    152, 122, 78, 42, 32, 38, 42, 42, 52, 48, 49, 58;
    199, 174, 132, 93, 69, 66, 73, 77, 81, 77, 79, 90;
    218, 203, 172, 139, 108, 98, 106, 115, 132, 132, 135, 145;
    230, 220, 205, 183, 155, 134, 139, 152, 171, 177, 185, 192;
    245, 235, 227, 212, 189, 163, 161, 176, 180, 191, 202, 213;
    249, 247, 240, 226, 213, 204, 204, 208, 206, 208, 214, 223;
    253, 253, 247, 238, 227, 221, 218, 220, 220, 221, 224, 227;
    249, 251, 250, 244, 237, 230, 229, 229, 231, 230, 233, 231;
    249, 251, 250, 246, 241, 236, 237, 236, 234, 235, 234, 233
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]
Sv1 :=
    S1 ← augment(B1, G1, R1)
    Sv1 ← S1[:, 0]
    for i ∈ 1 .. cols(S1) - 1
        Sv1 ← stack(Sv1, S1[:, i])
    Sv1
Sv1 = [
    12; 23; 63; 121; 162; 181; 191; 202; 208; 212; 214; 216
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]
# Модуль M.10 — извлечение квазисообщения из НЗБ
# Mf — квазисообщение: из младших битов каждой восьмёрки элементов собирается байт. Служебным кодам (меньше 32) прибавляется 32.5, чтобы строковые функции могли их обработать.
R_M = [
    140, 129, 120, 117, 107, 98, 106, 127, 112, 119, 127, 124;
    149, 126, 109, 98, 92, 92, 100, 110, 115, 117, 116, 114;
    176, 151, 115, 92, 88, 95, 101, 100, 117, 113, 108, 108;
    225, 196, 153, 116, 105, 110, 116, 114, 121, 114, 111, 118;
    254, 230, 192, 153, 132, 133, 141, 142, 149, 143, 139, 149;
    255, 244, 219, 188, 164, 157, 169, 180, 195, 192, 192, 199;
    254, 249, 237, 220, 198, 185, 194, 210, 229, 233, 236, 238;
    254, 250, 248, 242, 223, 204, 211, 229, 232, 241, 248, 253;
    253, 252, 253, 244, 238, 238, 247, 252, 252, 252, 255, 254;
    250, 252, 252, 250, 247, 245, 251, 254, 254, 255, 254, 254;
    245, 249, 250, 251, 250, 249, 250, 254, 255, 255, 255, 254;
    245, 247, 248, 251, 248, 249, 250, 252, 253, 255, 255, 248
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]
Mf :=
    for m ∈ 0 .. rows(Sv1)/8 - 1
        for i ∈ 0 .. 7
            P ← D2B(Sv1[i + 8*m])
            b[i] ← P[0]
        Mf[m] ← B2D(b)
        if Mf[m] < 32
            Mf[m] ← Mf[m] + 32.5
    Mf
Mf = [
    110; 48; 71; 64; 109; 48; 107; 44.5; 47; 87; 57; 71
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]
# Модуль M.11 — позиции служебных символов
# N — таблица позиций элементов, которым прибавили 32.5 (бывшие служебные символы). По ней позже восстанавливаются исходные значения.
N :=
    for s ∈ 0 .. 31
        i ← 0
        for m ∈ 0 .. rows(Mf) - 1
            if Mf[m] == s + 32.5
                N[i, s] ← m
                i ← i + 1
    N
N = [
    836, 47, 573, 70, 719, 45, 522, 246, 1434, 472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;
    904, 485, 810, 1266, 943, 477, 822, 317, 1729, 1555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;
    954, 619, 947, 1425, 1418, 601, 917, 484, 2158, 2003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;
    1146, 621, 1165, 1778, 3007, 740, 997, 566, 2465, 2377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;
    1283, 624, 1765, 2181, 3331, 902, 1834, 1835, 2769, 2471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;
    1585, 759, 2023, 2268, 3538, 1003, 2380, 2016, 2771, 2483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;
    1655, 930, 2513, 2525, 3688, 1470, 2420, 2324, 2838, 2524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;
    2019, 1009, 2869, 2927, 3731, 1687, 2828, 3105, 2937, 2866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;
    2074, 1030, 2880, 3172, 4085, 1724, 2871, 3771, 3385, 2949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;
    2233, 1562, 3832, 3259, 4201, 1918, 3506, 5021, 3392, 3049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]
m1_start := "n0G@m0k"
m1_end := "KiHeu,6"
# Модуль M.12 — выделение шифротекста по меткам
# M_cod1 — шифротекст, выделенный между метками. substr ищет метки в строке, str2vec переводит строку обратно в коды. Служебные символы восстанавливаются по таблице N.
M_cod1 :=
    s ← 0
    e ← 0
    bs ← strlen(m1_start)
    be ← strlen(m1_end)
    Mf ← vec2str(Mf)
    for m ∈ 0 .. strlen(Mf) - 1
        if substr(Mf, m, bs) == m1_start and s == 0
            s ← m + bs
        if substr(Mf, m, be) == m1_end and e == 0
            e ← m - 1
        if s ≠ 0 and e ≠ 0
            break
    Mf ← substr(Mf, s, e - s + 1)
    M_cod1 ← str2vec(Mf)
    for n ∈ 0 .. cols(N) - 1
        for i ∈ 0 .. rows(N) - 1
            if N[i, n] == 0
                break
            if N[i, n] > e
                break
            if s ≤ N[i, n] and N[i, n] ≤ e
                M_cod1[N[i, n] - bs] ← n
    M_cod1
M_cod1 = [
    12; 47; 87; 57; 71; 77; 48; 25; 36; 21
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]
rows(M_cod1) = 393
# Модули M.13-M.14 — расшифровка сообщения
# K11 — растянутый ключ (как в M.1). M1 — расшифрованное сообщение: из кода вычитается символ ключа по модулю 256 (обратная операция к шифрованию).
K11 :=
    K ← str2vec(K)
    for i ∈ 0 .. Nm - 1
        r ← mod(i, Nk)
        K1[i] ← K[r]
    K1
K11 = [
    64; 74; 101; 75; 99; 45; 73; 57; 56; 48
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]
M1 :=
    for j ∈ 0 .. Nm - 1
        M[j] ← mod(Na + M_cod1[j] - K11[j], Na)
    M
M1 = [
    204; 229; 242; 238; 228; 32; 231; 224; 236; 229
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]
WRITEBIN("M_dec.txt", "byte", 0, M1) = 0
rows(M1) = 393
# Проверка корректности: err = 0 означает побайтовое совпадение
# err — число несовпавших байтов расшифрованного M1 и исходного M. err=0 означает точное восстановление. vec2str(M1) показывает текст (кириллица как Latin-1 — это нормально, важны коды).
err :=
    s ← 0
    for j ∈ 0 .. Nm - 1
        if M1[j] ≠ M[j]
            s ← s + 1
    s
err = 0
submatrix(M1, 0, 15, 0, 0) = [204; 229; 242; 238; 228; 32; 231; 224; 236; 229; 237; 251; 32; 237; 224; 232]
vec2str(M1) = "Метод замены наименее значащего бита (НЗБ) наиболее распространён среди методов замены в пространственной области. Младший бит изображения несёт меньше всего информации, поэтому его можно использовать для встраивания секретного сообщения. Человек не способен заметить изменение этого бита, так как фактически НЗБ - это шум. Перед скрытием сообщение защищается модифицированным шифром Виженера."
